/TITLE, CONTINUUM GROUND STRUCTURE
! Created with:       FlExtract v1.13
! Element type:       PLANE42
! Number of nodes:    205
! Number of elements: 160

/PREP7
! Element type: ET, type #, name
ET, 1, PLANE42, , , 3
! Define material property: MP, property, card #, value
MP,EX, 1,  10.00000000
MP,PRXY,1, 0.000000000
MP,DENS,1,  1.00000000
R,1,1
! Nodal coordinates: 'N', node_id, x-coord, y-coord, z-coord
N,	1,	0,	0,	0
N,	2,	0,	0.25,	0
N,	3,	0,	0.5,	0
N,	4,	0,	0.75,	0
N,	5,	0,	1,	0
N,	6,	0.25,	0,	0
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N,	205,	10,	1,	0


! Connectivity
EN,	1	1	6	7	2
EN,	2	2	7	8	3
EN,	3	3	8	9	4
EN,	4	4	9	10	5
EN,	5	6	11	12	7
EN,	6	7	12	13	8
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EN,	160	199	204	205	200

! Nodal diplacement: 'D', node_id, 'UX / UY', value
D,	1,	UX,	0
D,	2,	UX,	0
D,	3,	UX,	0
D,	3,	UY,	0
D,	4,	UX,	0
D,	5,	UX,	0
D,	8,	UY,	0
D,	13,	UY,	0
D,	18,	UY,	0
D,	23,	UY,	0
D,	28,	UY,	0
D,	33,	UY,	0
D,	38,	UY,	0
D,	43,	UY,	0
D,	48,	UY,	0
D,	53,	UY,	0
D,	58,	UY,	0
D,	63,	UY,	0
D,	68,	UY,	0
D,	73,	UY,	0
D,	78,	UY,	0
D,	83,	UY,	0
D,	88,	UY,	0
D,	93,	UY,	0
D,	98,	UY,	0
D,	103,	UY,	0
D,	108,	UY,	0
D,	113,	UY,	0
D,	118,	UY,	0
D,	123,	UY,	0
D,	128,	UY,	0
D,	133,	UY,	0
D,	138,	UY,	0
D,	143,	UY,	0
D,	148,	UY,	0
D,	153,	UY,	0
D,	158,	UY,	0
D,	163,	UY,	0
D,	168,	UY,	0
D,	173,	UY,	0
D,	178,	UY,	0
D,	183,	UY,	0
D,	188,	UY,	0
D,	193,	UY,	0
D,	198,	UY,	0
D,	203,	UY,	0

! Nodal load: 'F', node_id, 'FX / FY', value
F, 1, FX, 1.0
! Surface load: 'SFE', element_id, face_id, 'PRES', 0, value

! Acceleration: 'ACEL', x-value, y-value, z-value
ACEL,	0.0,	0.0,	0.0

FINISH
/SOLU
antype, modal
FINISH
