/TITLE, CONTINUUM GROUND STRUCTURE
! GSTRUCT Version: 1.8
! Course: MEK 41525
! Element type: PLANE42
/PREP7
! Define element type: ET, type #, name
 ET,1,PLANE42
! Define material property: MP, property, card #, value
MP,EX,1,  1.00000000
MP,PRXY,1, 0.300000000
MP,DENS,1,  1.00000000
! Define nodal coordinate: N, node #, x-coord, y-coord, z-coordN,    1 ,    0.00000000 ,    0.00000000,    0.
N,    2 ,    0.00000000 ,    0.00400000,    0.
N,    3 ,    0.00000000 ,    0.00800000,    0.
N,    4 ,    0.00000000 ,    0.01200000,    0.
N,    5 ,    0.00000000 ,    0.01600000,    0.
N,    6 ,    0.00000000 ,    0.02000000,    0.
N,    7 ,    0.00000000 ,    0.02400000,    0.
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N,    1255 ,    1.00000000 ,    1.00000000,    0.
! Define element connectivity: EN, element #, nodal list
EN,    1 ,    1 ,    252 ,    253 ,    2
EN,    2 ,    2 ,    253 ,    254 ,    3
EN,    3 ,    3 ,    254 ,    255 ,    4
EN,    4 ,    4 ,    255 ,    256 ,    5
EN,    5 ,    5 ,    256 ,    257 ,    6
EN,    6 ,    6 ,    257 ,    258 ,    7
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EN,    1000 ,    1003 ,    1254 ,    1255 ,    1004
! Define boundary support conditions: D, node #, dof label, value
D,    1 ,    UX ,     0.000000000
D,    1 ,    UY ,     0.000000000
D,    1005 ,    UX ,     0.000000000
D,    1005 ,    UY ,     0.000000000
! Define nodal load conditions: F, node #, dof label, value
F,    1255 , FX ,    1.0
FINISH
